# Aluminium resmelter

Dataset: EcoSpold 1, unit process
Functional unit: 1 kg
Category: HSC / Aluminium
Geography: DE
Time period: 1900 to 1900
Production volume: 0
Share of production covered: 0 %
Generated by: RAK
copyright: true
accessRestrictedTo: 0

## Geography
Freiberg HIF

## Technology
Aluminium

## Time period
Refer to timestamp of dataset

## Reference product
- Aluminium die casting alloy: 1 kg

## Inputs from technosphere
- Methane: 0.0523436 kg
- Air: 0.901614 kg
- Aluminium scrap: 0.666683 kg
- Silicon: 0.12 kg
- Salt slag: 0.133337 kg
- Aluminium: 0.315483 kg
- Electricity: 0.395247 kWh

## Waste to treatment
- Waste heat: 0.50969 kWh
- Slag: 0.133337 kg
- Salt slag: 0.107271 kg

## Emissions to nature
- Flue gas [Other emissions to air]: 0.948851 kg
- Carbon monoxide [Inorganic emissions to air]: 0.000669993 kg
- Carbon dioxide [Inorganic emissions to air]: 0.142542 kg
- Water vapour [Inorganic emissions to air]: 0.117334 kg
- Nitrogen dioxide [Inorganic emissions to air]: 0.000182402 kg

## Extrapolations
no extrapolations

## Sources
- RAK, unknown, 2019
HSC Chemistry. http://www.hsc-chemistry.net

## Validation
Passed.
